# Prametry
Jc := Jc
Jc1 := Jc1
Jc2 := Jc2
mk := mk
m1 := m1
m2 := m2
e1 := e1
e2 := e2
kx := kx
ky := ky
bx := bx
by := by
a := a
β := β
H := H
l := l
g := g
# Wspolrzedne ugogolnione
x := x
y := y
α := α
ϕ1 := ϕ1
ϕ2 := ϕ2
# Wspołrzędne środka pierwszej masy nie wyważonej
xc1 := (-a*cos(β - α) - e1*cos(ϕ1) + x)
yc1 := a*sin(β - α) + e1*sin(ϕ1) + y
# Podstawienie w funkcji czasu
xc1 := (-a*cos(β - α) - e1*cos(ϕ1) + x) substitute, α == α(t), x == x(t), ϕ1 == ϕ1(t) → x(t) - e1*cos(ϕ1(t)) - a*cos(β - α(t))
yc1 := (a*sin(β - α) + e1*sin(ϕ1) + y) substitute, α == α(t), y == y(t), ϕ1 == ϕ1(t) → y(t) + e1*sin(ϕ1(t)) + a*sin(β - α(t))
# Predkości srodka pierwszej masy nie wyważonej
d/dt(xc1) → d/dt(x(t)) + e1*d/dt(ϕ1(t))*sin(ϕ1(t)) - a*d/dt(α(t))*sin(β - α(t))
d/dt(yc1) → d/dt(y(t)) + e1*d/dt(ϕ1(t))*cos(ϕ1(t)) - a*d/dt(α(t))*cos(β - α(t))
# Wspolrzedne srodka drugiej masy nie wyważonej
xc2 := (a*cos(β - α) + e2*cos(ϕ2) + x)
yc2 := -a*sin(β - α) + e2*sin(ϕ2) + y
# Predkosci środka drugiej masy nie wyważonej | Podstawienie w funkcji czasu
xc2 := (a*cos(β - α) + e2*cos(ϕ2) + x) substitute, α == α(t), x == x(t), ϕ2 == ϕ2(t) → x(t) + e2*cos(ϕ2(t)) + a*cos(β - α(t))
yc2 := (-a*sin(β - α) + e2*sin(ϕ2) + y) substitute, α == α(t), y == y(t), ϕ2 == ϕ2(t) → y(t) + e2*sin(ϕ2(t)) - a*sin(β - α(t))
d/dt(xc2) → d/dt(x(t)) - e2*d/dt(ϕ2(t))*sin(ϕ2(t)) + a*d/dt(α(t))*sin(β - α(t))
# Przygotowane do podmiany
d/dt(yc2) → d/dt(y(t)) + e2*d/dt(ϕ2(t))*cos(ϕ2(t)) + a*d/dt(α(t))*cos(β - α(t))
d/dt(x(t)) == vx, d/dt(ϕ1(t)) == ωϕ1, α(t) == α, d/dt(α(t)) == ωα
# Predkosci srodkow mas nie wywazonych
vxc1 := d/dt(x(t)) + e1*d/dt(ϕ1(t))*sin(ϕ1(t)) - a*d/dt(α(t))*sin(β - α(t)) substitute, d/dt(x(t)) == vx, d/dt(ϕ1(t)) == ωϕ1, α(t) == α, d/dt(α(t)) == ωα, ϕ1(t) == ϕ1 → vx + e1*ωϕ1*sin(ϕ1) - a*ωα*sin(β - α)
vyc1 := d/dt(y(t)) + e1*d/dt(ϕ1(t))*cos(ϕ1(t)) - a*d/dt(α(t))*cos(β - α(t)) substitute, d/dt(y(t)) == vy, d/dt(ϕ1(t)) == ωϕ1, α(t) == α, d/dt(α(t)) == ωα, ϕ1(t) == ϕ1 → vy + e1*ωϕ1*cos(ϕ1) - a*ωα*cos(β - α)
vxc2 := d/dt(x(t)) - e2*d/dt(ϕ2(t))*sin(ϕ2(t)) + a*d/dt(α(t))*sin(β - α(t)) substitute, d/dt(x(t)) == vx, d/dt(ϕ2(t)) == ωϕ2, α(t) == α, d/dt(α(t)) == ωα, ϕ2(t) == ϕ2 → vx - e2*ωϕ2*sin(ϕ2) + a*ωα*sin(β - α)
vyc2 := d/dt(y(t)) + e2*d/dt(ϕ2(t))*cos(ϕ2(t)) + a*d/dt(α(t))*cos(β - α(t)) substitute, d/dt(y(t)) == vy, d/dt(ϕ2(t)) == ωϕ2, α(t) == α, d/dt(α(t)) == ωα, ϕ2(t) == ϕ2 → vy + e2*ωϕ2*cos(ϕ2) + a*ωα*cos(β - α)
# Jeszce raz przemieszczenia i predkosci, bez uzaleznienia od czasu
xc1 := (-a*cos(β - α) - e1*cos(ϕ1) + x)
yc1 := a*sin(β - α) + e1*sin(ϕ1) + y
xc2 := (a*cos(β - α) + e2*cos(ϕ2) + x)
yc2 := -a*sin(β - α) + e2*sin(ϕ2) + y
# Lagranżjan
Ek := mk*vx^2/2 + mk*vy^2/2 + Jc*ωα^2/2 + (Jc1 + Jw1 + Js1)*ωϕ1^2/2 + (Jc2 + Jw2 + Js2)*ωϕ2^2/2 + □ + m1*vxc1^2/2 + m1*vyc1^2/2 + m2*vxc2^2/2 + m2*vyc2^2/2  # error: This placeholder is empty.
U := mk*g*y + m1*g*yc1 + m2*g*yc2 + ky*(y + l*α)^2/2 + ky*(y - l*α)^2/2 + kx*(x + H*α)^2/2 + kx*(-x - H*α)^2/2
L := mk*vx^2/2 + mk*vy^2/2 + Jc*ωα^2/2 + (Jc1 + Jw1 + Js1)*ωϕ1^2/2 + (Jc2 + Jw2 + Js2)*ωϕ2^2/2 + m1*vxc1^2/2 + m1*vyc1^2/2 + m2*vxc2^2/2 + m2*vyc2^2/2 - mk*g*y - m1*g*yc1 - m2*g*yc2 - ky*(y + l*α)^2/2 - ky*(y - l*α)^2/2 - kx*(x + H*α)^2/2 - kx*(-x - H*α)^2/2
# Moc start linowych
D := by*(vy + l*ωα)^2/2 + by*(vy - l*ωα)^2/2 + bx*(-vx - H*ωα)^2/2 + bx*(vx + H*ωα)^2/2
# Pochodne po ALFIE  -  α
d/dωα(L) → Jc*ωα - a*m1*cos(β - α)*(vy + e1*ωϕ1*cos(ϕ1) - a*ωα*cos(β - α)) + a*m2*cos(β - α)*(vy + e2*ωϕ2*cos(ϕ2) + a*ωα*cos(β - α)) - a*m1*sin(β - α)*(vx + e1*ωϕ1*sin(ϕ1) - a*ωα*sin(β - α)) + a*m2*sin(β - α)*(vx - e2*ωϕ2*sin(ϕ2) + a*ωα*sin(β - α))
dLdωα := d/dωα(L) substitute, α == α(t), ϕ1 == ϕ1(t), ϕ2 == ϕ2(t), ωα == ωα(t), ωϕ1 == ωϕ1(t), vx == vx(t), vy == vy(t), ωϕ2 == ωϕ2(t) → Jc*ωα(t) + a^2*m1*ωα(t) + a^2*m2*ωα(t) - a*m1*vy(t)*cos(β - α(t)) + a*m2*vy(t)*cos(β - α(t)) - a*m1*vx(t)*sin(β - α(t)) + a*m2*vx(t)*sin(β - α(t)) + a*e2*m2*ωϕ2(t)*cos(β - α(t) + ϕ2(t)) - a*e1*m1*cos(β - α(t) - ϕ1(t))*ωϕ1(t)
d/dt(dLdωα) → Jc*d/dt(ωα(t)) + a^2*m1*d/dt(ωα(t)) + a^2*m2*d/dt(ωα(t)) - a*m1*d/dt(vy(t))*cos(β - α(t)) + a*m2*d/dt(vy(t))*cos(β - α(t)) - a*m1*d/dt(vx(t))*sin(β - α(t)) + a*m2*d/dt(vx(t))*sin(β - α(t)) + a*e2*m2*d/dt(ωϕ2(t))*cos(β - α(t) + ϕ2(t)) - a*e1*m1*cos(β - α(t) - ϕ1(t))*d/dt(ωϕ1(t)) + a*m1*vx(t)*d/dt(α(t))*cos(β - α(t)) - a*m2*vx(t)*d/dt(α(t))*cos(β - α(t)) - a*m1*vy(t)*d/dt(α(t))*sin(β - α(t)) + a*m2*vy(t)*d/dt(α(t))*sin(β - α(t)) - a*e1*m1*sin(β - α(t) - ϕ1(t))*ωϕ1(t)*(d/dt(α(t)) + d/dt(ϕ1(t))) + a*e2*m2*ωϕ2(t)*sin(β - α(t) + ϕ2(t))*(d/dt(α(t)) - d/dt(ϕ2(t))) simplify → Jc*d/dt(ωα(t)) + a^2*m1*d/dt(ωα(t)) + a^2*m2*d/dt(ωα(t)) - a*m1*d/dt(vy(t))*cos(β - α(t)) + a*m2*d/dt(vy(t))*cos(β - α(t)) - a*m1*d/dt(vx(t))*sin(β - α(t)) + a*m2*d/dt(vx(t))*sin(β - α(t)) + a*e2*m2*d/dt(ωϕ2(t))*cos(β - α(t) + ϕ2(t)) - a*e1*m1*cos(β - α(t) - ϕ1(t))*d/dt(ωϕ1(t)) + a*m1*d/dt(α(t))*vx(t)*cos(β - α(t)) - a*m2*d/dt(α(t))*vx(t)*cos(β - α(t)) - a*m1*d/dt(α(t))*vy(t)*sin(β - α(t)) + a*m2*d/dt(α(t))*vy(t)*sin(β - α(t)) + a*e2*m2*d/dt(α(t))*ωϕ2(t)*sin(β - α(t) + ϕ2(t)) - a*e2*m2*ωϕ2(t)*d/dt(ϕ2(t))*sin(β - α(t) + ϕ2(t)) - a*e1*m1*sin(β - α(t) - ϕ1(t))*d/dt(α(t))*ωϕ1(t) - a*e1*m1*sin(β - α(t) - ϕ1(t))*ωϕ1(t)*d/dt(ϕ1(t))
dLdωαdt := d/dt(dLdωα) substitute, d/dt(ϕ2(t)) == ωϕ2, d/dt(ϕ1(t)) == ωϕ1, ϕ2(t) == ϕ2, ϕ1(t) == ϕ1, α(t) == α, d/dt(α(t)) == ωα, ωϕ1(t) == ωϕ1, ωϕ2(t) == ωϕ2, vy(t) == vy, vx(t) == vx, d/dt(vx(t)) == vvx, d/dt(vy(t)) == vvy, d/dt(ωα(t)) == ωωα, d/dt(ωϕ1(t)) == ωωϕ1, d/dt(ωϕ2(t)) == ωωϕ2 → Jc*ωωα + a^2*m1*ωωα + a^2*m2*ωωα - a*m1*vvy*cos(β - α) + a*m2*vvy*cos(β - α) - a*m1*vvx*sin(β - α) + a*m2*vvx*sin(β - α) - a*e1*m1*ωωϕ1*cos(β - α - ϕ1) - a*e2*m2*ωϕ2^2*sin(β - α + ϕ2) + a*m1*vx*ωα*cos(β - α) - a*m2*vx*ωα*cos(β - α) - a*m1*vy*ωα*sin(β - α) + a*m2*vy*ωα*sin(β - α) - a*e1*m1*ωϕ1^2*sin(β - α - ϕ1) + a*e2*m2*ωωϕ2*cos(β - α + ϕ2) + a*e2*m2*ωα*ωϕ2*sin(β - α + ϕ2) - a*e1*m1*ωα*ωϕ1*sin(β - α - ϕ1)
d/dα(L) → ky*l*(y - α*l) - ky*l*(y + α*l) - 2*H*kx*(x + H*α) + a*g*m1*cos(β - α) - a*g*m2*cos(β - α) - a*m1*ωα*sin(β - α)*(vy + e1*ωϕ1*cos(ϕ1) - a*ωα*cos(β - α)) + a*m2*ωα*sin(β - α)*(vy + e2*ωϕ2*cos(ϕ2) + a*ωα*cos(β - α)) + a*m1*ωα*cos(β - α)*(vx + e1*ωϕ1*sin(ϕ1) - a*ωα*sin(β - α)) - a*m2*ωα*cos(β - α)*(vx - e2*ωϕ2*sin(ϕ2) + a*ωα*sin(β - α)) simplify → a*g*m1*cos(β - α) - 2*kx*x*H - 2*α*ky*l^2 - 2*α*kx*H^2 - a*g*m2*cos(β - α) + a*m1*vx*ωα*cos(β - α) - a*m2*vx*ωα*cos(β - α) - a*m1*vy*ωα*sin(β - α) + a*m2*vy*ωα*sin(β - α) + a*e2*m2*ωα*ωϕ2*sin(β - α + ϕ2) - a*e1*m1*ωα*ωϕ1*sin(β - α - ϕ1)
dLdα := d/dα(L) → ky*l*(y - α*l) - ky*l*(y + α*l) - 2*H*kx*(x + H*α) + a*g*m1*cos(β - α) - a*g*m2*cos(β - α) - a*m1*ωα*sin(β - α)*(vy + e1*ωϕ1*cos(ϕ1) - a*ωα*cos(β - α)) + a*m2*ωα*sin(β - α)*(vy + e2*ωϕ2*cos(ϕ2) + a*ωα*cos(β - α)) + a*m1*ωα*cos(β - α)*(vx + e1*ωϕ1*sin(ϕ1) - a*ωα*sin(β - α)) - a*m2*ωα*cos(β - α)*(vx - e2*ωϕ2*sin(ϕ2) + a*ωα*sin(β - α))
d/dωα(D) → 2*H*bx*(vx + H*ωα) + by*l*(vy + l*ωα) - by*l*(vy - l*ωα) simplify → 2*bx*ωα*H^2 + 2*bx*vx*H + 2*by*ωα*l^2
dDdωα := d/dωα(D) → 2*H*bx*(vx + H*ωα) + by*l*(vy + l*ωα) - by*l*(vy - l*ωα)
# Pierwsze czlony
dLdωαdt → Jc*ωωα + a^2*m1*ωωα + a^2*m2*ωωα - a*m1*vvy*cos(β - α) + a*m2*vvy*cos(β - α) - a*m1*vvx*sin(β - α) + a*m2*vvx*sin(β - α) - a*e1*m1*ωωϕ1*cos(β - α - ϕ1) - a*e2*m2*ωϕ2^2*sin(β - α + ϕ2) + a*m1*vx*ωα*cos(β - α) - a*m2*vx*ωα*cos(β - α) - a*m1*vy*ωα*sin(β - α) + a*m2*vy*ωα*sin(β - α) - a*e1*m1*ωϕ1^2*sin(β - α - ϕ1) + a*e2*m2*ωωϕ2*cos(β - α + ϕ2) + a*e2*m2*ωα*ωϕ2*sin(β - α + ϕ2) - a*e1*m1*ωα*ωϕ1*sin(β - α - ϕ1)
dLdα → ky*l*(y - α*l) - ky*l*(y + α*l) - 2*H*kx*(x + H*α) + a*g*m1*cos(β - α) - a*g*m2*cos(β - α) - a*m1*ωα*sin(β - α)*(vy + e1*ωϕ1*cos(ϕ1) - a*ωα*cos(β - α)) + a*m2*ωα*sin(β - α)*(vy + e2*ωϕ2*cos(ϕ2) + a*ωα*cos(β - α)) + a*m1*ωα*cos(β - α)*(vx + e1*ωϕ1*sin(ϕ1) - a*ωα*sin(β - α)) - a*m2*ωα*cos(β - α)*(vx - e2*ωϕ2*sin(ϕ2) + a*ωα*sin(β - α))
dDdωα → 2*H*bx*(vx + H*ωα) + by*l*(vy + l*ωα) - by*l*(vy - l*ωα)
rown1 := dLdωαdt - dLdα + dDdωα/2 → Jc*ωωα + 2*H*kx*(x + H*α) + a^2*m1*ωωα + a^2*m2*ωωα + H*bx*(vx + H*ωα) + ky*l*(y + α*l) - ky*l*(y - α*l) + by*l*(vy + l*ωα)/2 - by*l*(vy - l*ωα)/2 - a*g*m1*cos(β - α) + a*g*m2*cos(β - α) - a*m1*vvy*cos(β - α) + a*m2*vvy*cos(β - α) - a*m1*vvx*sin(β - α) + a*m2*vvx*sin(β - α) - a*e1*m1*ωωϕ1*cos(β - α - ϕ1) - a*e2*m2*ωϕ2^2*sin(β - α + ϕ2) + a*m1*vx*ωα*cos(β - α) - a*m2*vx*ωα*cos(β - α) - a*m1*vy*ωα*sin(β - α) + a*m2*vy*ωα*sin(β - α) + a*m1*ωα*sin(β - α)*(vy + e1*ωϕ1*cos(ϕ1) - a*ωα*cos(β - α)) - a*m2*ωα*sin(β - α)*(vy + e2*ωϕ2*cos(ϕ2) + a*ωα*cos(β - α)) - a*m1*ωα*cos(β - α)*(vx + e1*ωϕ1*sin(ϕ1) - a*ωα*sin(β - α)) + a*m2*ωα*cos(β - α)*(vx - e2*ωϕ2*sin(ϕ2) + a*ωα*sin(β - α)) - a*e1*m1*ωϕ1^2*sin(β - α - ϕ1) + a*e2*m2*ωωϕ2*cos(β - α + ϕ2) + a*e2*m2*ωα*ωϕ2*sin(β - α + ϕ2) - a*e1*m1*ωα*ωϕ1*sin(β - α - ϕ1) simplify → Jc*ωωα + H*bx*vx + 2*H*kx*x + 2*H^2*α*kx + H^2*bx*ωα + 2*α*ky*l^2 + by*l^2*ωα + a^2*m1*ωωα + a^2*m2*ωωα - a*g*m1*cos(β - α) + a*g*m2*cos(β - α) - a*m1*vvy*cos(β - α) + a*m2*vvy*cos(β - α) - a*m1*vvx*sin(β - α) + a*m2*vvx*sin(β - α) - a*e1*m1*ωωϕ1*cos(β - α - ϕ1) - a*e2*m2*ωϕ2^2*sin(β - α + ϕ2) - a*e1*m1*ωϕ1^2*sin(β - α - ϕ1) + a*e2*m2*ωωϕ2*cos(β - α + ϕ2) simplify → Jc*ωωα + H*bx*vx + 2*H*kx*x + 2*H^2*α*kx + H^2*bx*ωα + 2*α*ky*l^2 + by*l^2*ωα + a^2*m1*ωωα + a^2*m2*ωωα - a*g*m1*cos(β - α) + a*g*m2*cos(β - α) - a*m1*vvy*cos(β - α) + a*m2*vvy*cos(β - α) - a*m1*vvx*sin(β - α) + a*m2*vvx*sin(β - α) - a*e1*m1*ωωϕ1*cos(β - α - ϕ1) - a*e2*m2*ωϕ2^2*sin(β - α + ϕ2) - a*e1*m1*ωϕ1^2*sin(β - α - ϕ1) + a*e2*m2*ωωϕ2*cos(β - α + ϕ2)
# po x-ie | Przekopiowane bo d/dt alfa nie dzialalo
d/dvx(L) → m1*(2*vx + 2*e1*ωϕ1*sin(ϕ1) - 2*a*ωα*sin(β - α))/2 + m2*(2*vx - 2*e2*ωϕ2*sin(ϕ2) + 2*a*ωα*sin(β - α))/2 + mk*vx
dLdvx := d/dvx(L) → m1*(2*vx + 2*e1*ωϕ1*sin(ϕ1) - 2*a*ωα*sin(β - α))/2 + m2*(2*vx - 2*e2*ωϕ2*sin(ϕ2) + 2*a*ωα*sin(β - α))/2 + mk*vx substitute, vx == vx(t), ωϕ1 == ωϕ1(t), ϕ1 == ϕ1(t), ωα == ωα(t), α == α(t), ωϕ2 == ωϕ2(t), ϕ2 == ϕ2(t) → m1*vx(t) + m2*vx(t) + mk*vx(t) + e1*m1*ωϕ1(t)*sin(ϕ1(t)) - e2*m2*ωϕ2(t)*sin(ϕ2(t)) - a*m1*ωα(t)*sin(β - α(t)) + a*m2*ωα(t)*sin(β - α(t))
dLdvxdt := d/dt(dLdvx) → m1*d/dt(vx(t)) + m2*d/dt(vx(t)) + mk*d/dt(vx(t)) + e1*m1*d/dt(ωϕ1(t))*sin(ϕ1(t)) - e2*m2*d/dt(ωϕ2(t))*sin(ϕ2(t)) - a*m1*d/dt(ωα(t))*sin(β - α(t)) + a*m2*d/dt(ωα(t))*sin(β - α(t)) + e1*m1*ωϕ1(t)*d/dt(ϕ1(t))*cos(ϕ1(t)) - e2*m2*ωϕ2(t)*d/dt(ϕ2(t))*cos(ϕ2(t)) + a*m1*ωα(t)*d/dt(α(t))*cos(β - α(t)) - a*m2*ωα(t)*d/dt(α(t))*cos(β - α(t)) substitute, d/dt(vx(t)) == vvx, d/dt(ωϕ1(t)) == ωωϕ1, d/dt(ωϕ2(t)) == ωωϕ2, d/dt(ωα(t)) == ωωα, d/dt(ϕ1(t)) == ωϕ1, d/dt(ϕ2(t)) == ωϕ2, α(t) == α, ϕ1(t) == ϕ1, ϕ2(t) == ϕ2, ωα(t) == ωα, ωϕ1(t) == ωϕ1, ωϕ2(t) == ωϕ2, d/dt(α(t)) == ωα → e1*m1*cos(ϕ1)*ωϕ1^2 - e2*m2*cos(ϕ2)*ωϕ2^2 + m1*vvx + m2*vvx + mk*vvx + e1*m1*ωωϕ1*sin(ϕ1) - e2*m2*ωωϕ2*sin(ϕ2) - a*m1*ωωα*sin(β - α) + a*m2*ωωα*sin(β - α) + a*m1*ωα*cos(β - α)*d/dt(α(t)) - a*m2*ωα*cos(β - α)*d/dt(α(t))
dLdvxdt := e1*m1*cos(ϕ1)*ωϕ1^2 - e2*m2*cos(ϕ2)*ωϕ2^2 + m1*vvx + m2*vvx + mk*vvx + e1*m1*ωωϕ1*sin(ϕ1) - e2*m2*ωωϕ2*sin(ϕ2) - a*m1*ωωα*sin(β - α) + a*m2*ωωα*sin(β - α) + a*m1*ωα^2*cos(β - α) - a*m2*ωα^2*cos(β - α)
dLdx := d/dx(L) → -kx*(2*x + 2*H*α)
dDdvx := d/dvx(D) → bx*(2*vx + 2*H*ωα)
rown2 := dLdvxdt - dLdx + dDdvx/2 → kx*(2*x + 2*H*α) + m1*vvx + m2*vvx + mk*vvx + bx*(2*vx + 2*H*ωα)/2 + e1*m1*ωϕ1^2*cos(ϕ1) - e2*m2*ωϕ2^2*cos(ϕ2) + a*m1*ωα^2*cos(β - α) - a*m2*ωα^2*cos(β - α) + e1*m1*ωωϕ1*sin(ϕ1) - e2*m2*ωωϕ2*sin(ϕ2) - a*m1*ωωα*sin(β - α) + a*m2*ωωα*sin(β - α) simplify → bx*vx + 2*kx*x + m1*vvx + m2*vvx + mk*vvx + 2*H*α*kx + H*bx*ωα + e1*m1*ωϕ1^2*cos(ϕ1) - e2*m2*ωϕ2^2*cos(ϕ2) + a*m1*ωα^2*cos(β - α) - a*m2*ωα^2*cos(β - α) + e1*m1*ωωϕ1*sin(ϕ1) - e2*m2*ωωϕ2*sin(ϕ2) - a*m1*ωωα*sin(β - α) + a*m2*ωωα*sin(β - α)
# po y-eku
d/dvy(L) → m1*(2*vy + 2*e1*ωϕ1*cos(ϕ1) - 2*a*ωα*cos(β - α))/2 + m2*(2*vy + 2*e2*ωϕ2*cos(ϕ2) + 2*a*ωα*cos(β - α))/2 + mk*vy
dLdvy := d/dvy(L) → m1*(2*vy + 2*e1*ωϕ1*cos(ϕ1) - 2*a*ωα*cos(β - α))/2 + m2*(2*vy + 2*e2*ωϕ2*cos(ϕ2) + 2*a*ωα*cos(β - α))/2 + mk*vy substitute, vy == vy(t), ωϕ1 == ωϕ1(t), ωϕ2 == ωϕ2(t), ωα == ωα(t), ϕ1 == ϕ1(t), ϕ2 == ϕ2(t), α == α(t) → m1*vy(t) + m2*vy(t) + mk*vy(t) + e1*m1*ωϕ1(t)*cos(ϕ1(t)) + e2*m2*ωϕ2(t)*cos(ϕ2(t)) - a*m1*ωα(t)*cos(β - α(t)) + a*m2*ωα(t)*cos(β - α(t))
dLdvydt := d/dt(dLdvy) → m1*d/dt(vy(t)) + m2*d/dt(vy(t)) + mk*d/dt(vy(t)) + e1*m1*d/dt(ωϕ1(t))*cos(ϕ1(t)) + e2*m2*d/dt(ωϕ2(t))*cos(ϕ2(t)) - a*m1*d/dt(ωα(t))*cos(β - α(t)) + a*m2*d/dt(ωα(t))*cos(β - α(t)) - e1*m1*ωϕ1(t)*d/dt(ϕ1(t))*sin(ϕ1(t)) - e2*m2*ωϕ2(t)*d/dt(ϕ2(t))*sin(ϕ2(t)) - a*m1*ωα(t)*d/dt(α(t))*sin(β - α(t)) + a*m2*ωα(t)*d/dt(α(t))*sin(β - α(t)) substitute, d/dt(vy(t)) == vvy, d/dt(ωϕ1(t)) == ωωϕ1, d/dt(ωϕ2(t)) == ωωϕ2, d/dt(ωα(t)) == ωωα, d/dt(ϕ1(t)) == ωϕ1, d/dt(ϕ2(t)) == ωϕ2, d/dt(α(t)) == ωα, α(t) == α, ϕ1(t) == ϕ1, ϕ2(t) == ϕ2, ωα(t) == ωα, ωϕ1(t) == ωϕ1, ωϕ2(t) == ωϕ2 → m1*vvy - e2*m2*sin(ϕ2)*ωϕ2^2 - e1*m1*sin(ϕ1)*ωϕ1^2 + m2*vvy + mk*vvy + e1*m1*ωωϕ1*cos(ϕ1) + e2*m2*ωωϕ2*cos(ϕ2) - a*m1*ωωα*cos(β - α) + a*m2*ωωα*cos(β - α) - a*m1*ωα*sin(β - α)*d/dt(α(t)) + a*m2*ωα*sin(β - α)*d/dt(α(t)) → m1*vvy - e2*m2*sin(ϕ2)*ωϕ2^2 - e1*m1*sin(ϕ1)*ωϕ1^2 + m2*vvy + mk*vvy + e1*m1*ωωϕ1*cos(ϕ1) + e2*m2*ωωϕ2*cos(ϕ2) - a*m1*ωωα*cos(β - α) + a*m2*ωωα*cos(β - α) - a*m1*ωα*sin(β - α)*d/dt(α(t)) + a*m2*ωα*sin(β - α)*d/dt(α(t))
dLdvydt := m1*vvy - e2*m2*sin(ϕ2)*ωϕ2^2 - e1*m1*sin(ϕ1)*ωϕ1^2 + m2*vvy + mk*vvy + e1*m1*ωωϕ1*cos(ϕ1) + e2*m2*ωωϕ2*cos(ϕ2) - a*m1*ωωα*cos(β - α) + a*m2*ωωα*cos(β - α) - a*m1*ωα^2*sin(β - α) + a*m2*ωα^2*sin(β - α)
dLdy := d/dy(L) → -g*m1 - g*m2 - g*mk - ky*(2*y - 2*α*l)/2 - ky*(2*y + 2*α*l)/2
dDdvy := d/dvy(D) → by*(2*vy - 2*l*ωα)/2 + by*(2*vy + 2*l*ωα)/2
rown3 := dLdvydt - dLdy + dDdvy → g*m1 + g*m2 + g*mk + m1*vvy + m2*vvy + mk*vvy + ky*(2*y - 2*α*l)/2 + ky*(2*y + 2*α*l)/2 + by*(2*vy - 2*l*ωα)/2 + by*(2*vy + 2*l*ωα)/2 - e1*m1*ωϕ1^2*sin(ϕ1) - e2*m2*ωϕ2^2*sin(ϕ2) - a*m1*ωα^2*sin(β - α) + a*m2*ωα^2*sin(β - α) + e1*m1*ωωϕ1*cos(ϕ1) + e2*m2*ωωϕ2*cos(ϕ2) - a*m1*ωωα*cos(β - α) + a*m2*ωωα*cos(β - α) simplify → g*m1 + g*m2 + g*mk + 2*by*vy + m1*vvy + m2*vvy + mk*vvy + 2*ky*y - e1*m1*ωϕ1^2*sin(ϕ1) - e2*m2*ωϕ2^2*sin(ϕ2) - a*m1*ωα^2*sin(β - α) + a*m2*ωα^2*sin(β - α) + e1*m1*ωωϕ1*cos(ϕ1) + e2*m2*ωωϕ2*cos(ϕ2) - a*m1*ωωα*cos(β - α) + a*m2*ωωα*cos(β - α)
# Po fi 1
d/dωϕ1(L) → ωϕ1*(Jc1 + Js1 + Jw1) + e1*m1*cos(ϕ1)*(vy + e1*ωϕ1*cos(ϕ1) - a*ωα*cos(β - α)) + e1*m1*sin(ϕ1)*(vx + e1*ωϕ1*sin(ϕ1) - a*ωα*sin(β - α))
dLdωϕ1 := d/dωϕ1(L) → ωϕ1*(Jc1 + Js1 + Jw1) + e1*m1*cos(ϕ1)*(vy + e1*ωϕ1*cos(ϕ1) - a*ωα*cos(β - α)) + e1*m1*sin(ϕ1)*(vx + e1*ωϕ1*sin(ϕ1) - a*ωα*sin(β - α)) substitute, ωϕ1 == ωϕ1(t), ϕ1 == ϕ1(t), ωα == α(t), α == α(t), vx == vx(t), vy == vy(t) → Jc1*ωϕ1(t) + Js1*ωϕ1(t) + Jw1*ωϕ1(t) + e1^2*m1*ωϕ1(t) + e1*m1*vy(t)*cos(ϕ1(t)) + e1*m1*vx(t)*sin(ϕ1(t)) - a*e1*m1*cos(β - α(t) - ϕ1(t))*α(t)
dLdωϕ1dt := d/dt(dLdωϕ1) → Jc1*d/dt(ωϕ1(t)) + Js1*d/dt(ωϕ1(t)) + Jw1*d/dt(ωϕ1(t)) + e1^2*m1*d/dt(ωϕ1(t)) + e1*m1*d/dt(vy(t))*cos(ϕ1(t)) + e1*m1*d/dt(vx(t))*sin(ϕ1(t)) + e1*m1*vx(t)*d/dt(ϕ1(t))*cos(ϕ1(t)) - e1*m1*vy(t)*d/dt(ϕ1(t))*sin(ϕ1(t)) - a*e1*m1*cos(β - α(t) - ϕ1(t))*d/dt(α(t)) - a*e1*m1*sin(β - α(t) - ϕ1(t))*α(t)*(d/dt(α(t)) + d/dt(ϕ1(t))) substitute, d/dt(vy(t)) == vvy, d/dt(vx(t)) == vvx, d/dt(ωα(t)) == ωωα, d/dt(ωϕ1(t)) == ωωϕ1, d/dt(ωϕ2(t)) == ωωϕ2, d/dt(ϕ1(t)) == ωϕ1, d/dt(ϕ2(t)) == ωϕ2, d/dt(α(t)) == ωα, α(t) == α, ϕ1(t) == ϕ1, ϕ2(t) == ϕ2, vx(t) == vx, vy(t) == vy → Jc1*ωωϕ1 + Js1*ωωϕ1 + Jw1*ωωϕ1 + e1^2*m1*ωωϕ1 + e1*m1*vvy*cos(ϕ1) + e1*m1*vvx*sin(ϕ1) + e1*m1*vx*ωϕ1*cos(ϕ1) - e1*m1*vy*ωϕ1*sin(ϕ1) - a*e1*m1*cos(β - α - ϕ1)*d/dt(α(t)) - a*α*e1*m1*ωϕ1*sin(β - α - ϕ1) - a*α*e1*m1*sin(β - α - ϕ1)*d/dt(α(t))
dLdωϕ1dt := Jc1*ωωϕ1 + Js1*ωωϕ1 + Jw1*ωωϕ1 + e1^2*m1*ωωϕ1 + e1*m1*vvy*cos(ϕ1) + e1*m1*vvx*sin(ϕ1) + e1*m1*vx*ωϕ1*cos(ϕ1) - e1*m1*vy*ωϕ1*sin(ϕ1) - a*e1*m1*cos(β - α - ϕ1)*ωα - a*α*e1*m1*ωϕ1*sin(β - α - ϕ1) - a*α*e1*m1*sin(β - α - ϕ1)*ωα
dLdϕ1 := d/dϕ1(L) → e1*m1*ωϕ1*cos(ϕ1)*(vx + e1*ωϕ1*sin(ϕ1) - a*ωα*sin(β - α)) - e1*m1*ωϕ1*sin(ϕ1)*(vy + e1*ωϕ1*cos(ϕ1) - a*ωα*cos(β - α)) - e1*g*m1*cos(ϕ1)
dDdωϕ1 := d/dωϕ1(D) → 0
rown4 := dLdωϕ1dt - dLdϕ1 + dDdωϕ1 → Jc1*ωωϕ1 + Js1*ωωϕ1 + Jw1*ωωϕ1 + e1^2*m1*ωωϕ1 + e1*g*m1*cos(ϕ1) + e1*m1*vvy*cos(ϕ1) + e1*m1*vvx*sin(ϕ1) - a*e1*m1*ωα*cos(β - α - ϕ1) + e1*m1*vx*ωϕ1*cos(ϕ1) - e1*m1*vy*ωϕ1*sin(ϕ1) + e1*m1*ωϕ1*sin(ϕ1)*(vy + e1*ωϕ1*cos(ϕ1) - a*ωα*cos(β - α)) - e1*m1*ωϕ1*cos(ϕ1)*(vx + e1*ωϕ1*sin(ϕ1) - a*ωα*sin(β - α)) - a*α*e1*m1*ωα*sin(β - α - ϕ1) - a*α*e1*m1*ωϕ1*sin(β - α - ϕ1) simplify → Jc1*ωωϕ1 + Js1*ωωϕ1 + Jw1*ωωϕ1 + e1^2*m1*ωωϕ1 + e1*g*m1*cos(ϕ1) + e1*m1*vvy*cos(ϕ1) + e1*m1*vvx*sin(ϕ1) - a*e1*m1*ωα*cos(β - α - ϕ1) - a*α*e1*m1*ωα*sin(β - α - ϕ1) - a*α*e1*m1*ωϕ1*sin(β - α - ϕ1) + a*e1*m1*ωα*ωϕ1*sin(β - α - ϕ1)
# Po fi 2
d/dωϕ2(L) → ωϕ2*(Jc2 + Js2 + Jw2) + e2*m2*cos(ϕ2)*(vy + e2*ωϕ2*cos(ϕ2) + a*ωα*cos(β - α)) - e2*m2*sin(ϕ2)*(vx - e2*ωϕ2*sin(ϕ2) + a*ωα*sin(β - α))
dLdωϕ2 := d/dωϕ2(L) → ωϕ2*(Jc2 + Js2 + Jw2) + e2*m2*cos(ϕ2)*(vy + e2*ωϕ2*cos(ϕ2) + a*ωα*cos(β - α)) - e2*m2*sin(ϕ2)*(vx - e2*ωϕ2*sin(ϕ2) + a*ωα*sin(β - α)) substitute, ωϕ2 == ωϕ2(t), ϕ2 == ϕ2(t), ωα == α(t), α == α(t), vx == vx(t), vy == vy(t) → Jc2*ωϕ2(t) + Js2*ωϕ2(t) + Jw2*ωϕ2(t) + e2^2*m2*ωϕ2(t) + e2*m2*vy(t)*cos(ϕ2(t)) - e2*m2*vx(t)*sin(ϕ2(t)) + a*e2*m2*α(t)*cos(β - α(t) + ϕ2(t))
dLdωϕ2dt := d/dt(dLdωϕ2) → Jc2*d/dt(ωϕ2(t)) + Js2*d/dt(ωϕ2(t)) + Jw2*d/dt(ωϕ2(t)) + e2^2*m2*d/dt(ωϕ2(t)) + e2*m2*d/dt(vy(t))*cos(ϕ2(t)) - e2*m2*d/dt(vx(t))*sin(ϕ2(t)) + a*e2*m2*d/dt(α(t))*cos(β - α(t) + ϕ2(t)) - e2*m2*vx(t)*d/dt(ϕ2(t))*cos(ϕ2(t)) - e2*m2*vy(t)*d/dt(ϕ2(t))*sin(ϕ2(t)) + a*e2*m2*α(t)*sin(β - α(t) + ϕ2(t))*(d/dt(α(t)) - d/dt(ϕ2(t))) substitute, d/dt(vy(t)) == vvy, d/dt(vx(t)) == vvx, d/dt(ωα(t)) == ωωα, d/dt(ωϕ1(t)) == ωωϕ1, d/dt(ωϕ2(t)) == ωωϕ2, d/dt(ϕ1(t)) == ωϕ1, d/dt(ϕ2(t)) == ωϕ2, d/dt(α(t)) == ωα, α(t) == α, ϕ1(t) == ϕ1, ϕ2(t) == ϕ2, vx(t) == vx, vy(t) == vy → Jc2*ωωϕ2 + Js2*ωωϕ2 + Jw2*ωωϕ2 + e2^2*m2*ωωϕ2 + e2*m2*vvy*cos(ϕ2) - e2*m2*vvx*sin(ϕ2) + a*e2*m2*d/dt(α(t))*cos(β - α + ϕ2) - e2*m2*vx*ωϕ2*cos(ϕ2) - e2*m2*vy*ωϕ2*sin(ϕ2) - a*α*e2*m2*ωϕ2*sin(β - α + ϕ2) + a*α*e2*m2*d/dt(α(t))*sin(β - α + ϕ2)
dLdωϕ2dt := Jc2*ωωϕ2 + Js2*ωωϕ2 + Jw2*ωωϕ2 + e2^2*m2*ωωϕ2 + e2*m2*vvy*cos(ϕ2) - e2*m2*vvx*sin(ϕ2) + a*e2*m2*ωα*cos(β - α + ϕ2) - e2*m2*vx*ωϕ2*cos(ϕ2) - e2*m2*vy*ωϕ2*sin(ϕ2) - a*α*e2*m2*ωϕ2*sin(β - α + ϕ2) + a*α*e2*m2*ωα*sin(β - α + ϕ2)
dLdϕ2 := d/dϕ2(L) → -e2*g*m2*cos(ϕ2) - e2*m2*ωϕ2*sin(ϕ2)*(vy + e2*ωϕ2*cos(ϕ2) + a*ωα*cos(β - α)) - e2*m2*ωϕ2*cos(ϕ2)*(vx - e2*ωϕ2*sin(ϕ2) + a*ωα*sin(β - α))
dDdωϕ2 := d/dωϕ2(D) → 0
rown5 := dLdωϕ2dt - dLdϕ2 + dDdωϕ2 → Jc2*ωωϕ2 + Js2*ωωϕ2 + Jw2*ωωϕ2 + e2^2*m2*ωωϕ2 + e2*g*m2*cos(ϕ2) + e2*m2*vvy*cos(ϕ2) - e2*m2*vvx*sin(ϕ2) - e2*m2*vx*ωϕ2*cos(ϕ2) - e2*m2*vy*ωϕ2*sin(ϕ2) + e2*m2*ωϕ2*sin(ϕ2)*(vy + e2*ωϕ2*cos(ϕ2) + a*ωα*cos(β - α)) + e2*m2*ωϕ2*cos(ϕ2)*(vx - e2*ωϕ2*sin(ϕ2) + a*ωα*sin(β - α)) + a*e2*m2*ωα*cos(β - α + ϕ2) + a*α*e2*m2*ωα*sin(β - α + ϕ2) - a*α*e2*m2*ωϕ2*sin(β - α + ϕ2) simplify → Jc2*ωωϕ2 + Js2*ωωϕ2 + Jw2*ωωϕ2 + e2^2*m2*ωωϕ2 + e2*g*m2*cos(ϕ2) + e2*m2*vvy*cos(ϕ2) - e2*m2*vvx*sin(ϕ2) + a*e2*m2*ωα*cos(β - α + ϕ2) + a*α*e2*m2*ωα*sin(β - α + ϕ2) - a*α*e2*m2*ωϕ2*sin(β - α + ϕ2) + a*e2*m2*ωα*ωϕ2*sin(β - α + ϕ2)
