# Materiały do zajęć MwPM - dr inż. Marek Gajowy
#
# Wyprowadzenie równań Lagrange'a - równań dynamicznych uproszczonego modelu dynamicznego - przy pomocy programu Mathcad
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J := Jc  # Centralny moment bezwładności przechodzący przez środek cięzkości względem osi równoległej do osi obrotu
# Współrzędne uogólnione q = {y,ϕ}
# Równania więzów - wyznacznie położenia środka cięzkości wibratora x1 oraz y1 - zdefiniować bez uzależniania od czasu
x1 := e*cos(ϕ)
y1 := y + e*sin(ϕ)
# Wykonywanie pochodnej po czasie - wcześniej konieczność zamiany elementów zależnych od czasu w sposób niejawny na jawny funkcją substitute, y == y(t), ϕ == ϕ(t)
x1 := e*cos(ϕ) substitute, y == y(t), ϕ == ϕ(t) → cos(ϕ(t))*e
y1 := y + e*sin(ϕ) substitute, y == y(t), ϕ == ϕ(t) → y(t) + sin(ϕ(t))*e
d/dt(x1) → -d/dt(ϕ(t))*sin(ϕ(t))*e  # *****
d/dt(y1) → d/dt(y(t)) + d/dt(ϕ(t))*cos(ϕ(t))*e
# Prędkosc po wspórzednej x1 nazwę vx1 kopiując wynik pochodnej ***** i jednocześnie zastąpię elementy zależne od czasu innymi symbolami pozbawionymi t - funkcja "substitute"
vx1 := -d/dt(ϕ(t))*sin(ϕ(t))*e substitute, d/dt(ϕ(t)) == ωϕ, ϕ(t) == ϕ, y(t) == y, d/dt(y(t)) == vy → -ωϕ*e*sin(ϕ)
d/dt(ϕ(t)) == ωϕ, ϕ(t) == ϕ, y(t) == y, d/dt(y(t)) == vy  # przygotowany zestaw na podmiane w pozostałych przypadkach
d/dt(y1) → d/dt(y(t)) + d/dt(ϕ(t))*cos(ϕ(t))*e  # +++++
# Prędkosc po wspórzednej y1 nazwę vy1 kopiując wynik pochodnej +++++ i jednocześnie zastąpię elementy zależne od czasu innymi symbolami pozbawionymi t - funkcja "substitute"
vy1 := d/dt(y(t)) + d/dt(ϕ(t))*cos(ϕ(t))*e substitute, d/dt(ϕ(t)) == ωϕ, ϕ(t) == ϕ, y(t) == y, d/dt(y(t)) == vy → vy + ωϕ*e*cos(ϕ)
# Zdefiniowanie potencjału Lagrage'a bez uzależniania od czasu
# Definiuję jeszcze raz zmienne przemieszczeń gdyż wczesniej liczyłem pochodne po czasie i x1 oraz y1 ponieważ zostały nadpisane wcześniej
x1 := e*cos(ϕ) → e*cos(ϕ)
y1 := y + e*sin(ϕ) → y + e*sin(ϕ)
# Potencjał kinetyczny Lagrange' L := E - U  oraz funkcja dysypacji energii D
L := m*vy^2/2 + m1*vx1^2/2 + m1*vy1^2/2 + Jc*ωϕ^2/2 - k*y^2/2 + (-m*g) - m1*g*y1 → m1*(vy + ωϕ*e*cos(ϕ))^2/2 + Jc*ωϕ^2/2 + m*vy^2/2 - k*y^2/2 - g*m - g*m1*(y + e*sin(ϕ)) + m1*ωϕ^2*e^2*sin(ϕ)^2/2
D := b*vy^2/2
# Pochodne dla rownania po wspolrzednej y - w tym celu używamy funkcji
d/dy(L) → -g*m1 - k*y
dLdy := -g*m1 - k*y substitute, ωϕ == d/dt(ϕ(t)), vy == d/dt(y(t)), ϕ == ϕ(t), y == y(t) → -k*y(t) - g*m1
d/dvy(L) → m*vy + m1*(2*vy + 2*ωϕ*e*cos(ϕ))/2
# Nadanie nazwy członowi d/dvy(L) oraz uzaleznienie od czasu
dLdvy := m*vy + m1*(2*vy + 2*ωϕ*e*cos(ϕ))/2 substitute, ωϕ == d/dt(ϕ(t)), vy == d/dt(y(t)), ϕ == ϕ(t), y == y(t) → m*d/dt(y(t)) + m1*d/dt(y(t)) + m1*d/dt(ϕ(t))*cos(ϕ(t))*e
d/dt(dLdvy) → m*d^2/dt^2(y(t)) + m1*d^2/dt^2(y(t)) + m1*d^2/dt^2(ϕ(t))*cos(ϕ(t))*e - m1*d/dt(ϕ(t))*d/dt(ϕ(t))*sin(ϕ(t))*e
# Można uzyć funkcji "simplify" oraz "subsitute" dla zamiany wspolrzednych z zaleznych od czasu na symbole bez t
d/dvy(D) → b*vy
dDdvy := b*vy substitute, ωϕ == d/dt(ϕ(t)), vy == d/dt(y(t)), ϕ == ϕ(t), y == y(t) → b*d/dt(y(t))
# ROWNANIE
d/dt(dLdvy) - dLdy + dDdvy → b*d/dt(y(t)) + k*y(t) + m*d^2/dt^2(y(t)) + m1*d^2/dt^2(y(t)) + g*m1 + m1*d^2/dt^2(ϕ(t))*cos(ϕ(t))*e - m1*d/dt(ϕ(t))*d/dt(ϕ(t))*sin(ϕ(t))*e
b*d/dt(y(t)) + k*y(t) + m*d^2/dt^2(y(t)) + m1*d^2/dt^2(y(t)) + g*m1 + m1*d^2/dt^2(ϕ(t))*cos(ϕ(t))*e - m1*d/dt(ϕ(t))*d/dt(ϕ(t))*sin(ϕ(t))*e
# gotowe rownanie
b*d/dt(y(t)) - m1*sin(ϕ(t))*e*(d/dt(ϕ(t)))^2 + k*y(t) + m*d^2/dt^2(y(t)) + m1*d^2/dt^2(y(t)) + g*m1 + m1*cos(ϕ(t))*d^2/dt^2(ϕ(t))*e
□ == 0
# Pochodne dla rownania po wspolrzednej ϕ
d/dϕ(L) → m1*ωϕ^2*e^2*cos(ϕ)*sin(ϕ) - g*m1*e*cos(ϕ) - m1*ωϕ*e*sin(ϕ)*(vy + ωϕ*e*cos(ϕ))
dLdϕ := m1*ωϕ^2*e^2*cos(ϕ)*sin(ϕ) - g*m1*e*cos(ϕ) - m1*ωϕ*e*sin(ϕ)*(vy + ωϕ*e*cos(ϕ)) substitute, ωϕ == d/dt(ϕ(t)), vy == d/dt(y(t)), ϕ == ϕ(t), y == y(t) → -g*m1*cos(ϕ(t))*e - m1*d/dt(ϕ(t))*sin(ϕ(t))*d/dt(y(t))*e
d/dωϕ(L) → m1*ωϕ*e^2*sin(ϕ)^2 + Jc*ωϕ + m1*e*cos(ϕ)*(vy + ωϕ*e*cos(ϕ))
# Nadanie nazwy członowi d/dωϕ(L) oraz uzaleznienie od czasu
dLdωϕ := m1*ωϕ*e^2*sin(ϕ)^2 + Jc*ωϕ + m1*e*cos(ϕ)*(vy + ωϕ*e*cos(ϕ)) substitute, ωϕ == d/dt(ϕ(t)), vy == d/dt(y(t)), ϕ == ϕ(t), y == y(t) → Jc*d/dt(ϕ(t)) + m1*d/dt(ϕ(t))*e^2 + m1*cos(ϕ(t))*d/dt(y(t))*e
d/dt(dLdωϕ) → Jc*d^2/dt^2(ϕ(t)) + m1*d^2/dt^2(ϕ(t))*e^2 + m1*cos(ϕ(t))*d^2/dt^2(y(t))*e - m1*d/dt(ϕ(t))*sin(ϕ(t))*d/dt(y(t))*e
# Można uzyć funkcji "simplify" oraz "subsitute" dla zamiany wspolrzednych z zaleznych od czasu na symbole bez t
d/dωϕ(D) → 0
dDdωϕ := 0 substitute, ωϕ == d/dt(ϕ(t)), vy == d/dt(y(t)), ϕ == ϕ(t), y == y(t) → 0
# ROWNANIE
d/dt(dLdωϕ) - dLdϕ + dDdωϕ → Jc*d^2/dt^2(ϕ(t)) + m1*d^2/dt^2(ϕ(t))*e^2 + m1*cos(ϕ(t))*d^2/dt^2(y(t))*e + g*m1*cos(ϕ(t))*e + m1*d/dt(ϕ(t))*sin(ϕ(t))*d/dt(y(t))*e - m1*d/dt(ϕ(t))*sin(ϕ(t))*d/dt(y(t))*e
Jc*d^2/dt^2(ϕ(t)) + m1*d^2/dt^2(ϕ(t))*e^2 + m1*cos(ϕ(t))*d^2/dt^2(y(t))*e + g*m1*cos(ϕ(t))*e + m1*d/dt(ϕ(t))*sin(ϕ(t))*d/dt(y(t))*e - m1*d/dt(ϕ(t))*sin(ϕ(t))*d/dt(y(t))*e
# gotowe rownanie
Jc*d^2/dt^2(ϕ(t)) + m1*d^2/dt^2(ϕ(t))*e^2 + m1*cos(ϕ(t))*d^2/dt^2(y(t))*e + g*m1*cos(ϕ(t))*e  # Mel
