# Prametry
Jc := Jc
Jc1 := Jc1
mk := mk
m1 := m1
e := e
kx := kx
ky := ky
bx := bx
by := by
a := a
β := β
H := H
l := l
g := g
# Wspolrzedne ugogolnione
x := x
y := y
α := α
ϕ1 := ϕ1
ϕ2 := ϕ2
# Wspołrzędne środka pierwszej masy nie wyważonej
xc1 := (-a*cos(β - α) - e*cos(ϕ1) + x)
yc1 := a*sin(β - α) + e*sin(ϕ1) + y
# Podstawienie w funkcji czasu
xc1 := (-a*cos(β - α) - e*cos(ϕ1) + x) substitute, α == α(t), x == x(t), ϕ1 == ϕ1(t) → x(t) - a*cos(β - α(t)) - cos(ϕ1(t))*e
yc1 := (a*sin(β - α) + e*sin(ϕ1) + y) substitute, α == α(t), y == y(t), ϕ1 == ϕ1(t) → y(t) + a*sin(β - α(t)) + sin(ϕ1(t))*e
# Predkości srodka pierwszej masy nie wyważonej
d/dt(xc1) → d/dt(x(t)) - a*d/dt(α(t))*sin(β - α(t)) + d/dt(ϕ1(t))*sin(ϕ1(t))*e
d/dt(yc1) → d/dt(y(t)) - a*d/dt(α(t))*cos(β - α(t)) + d/dt(ϕ1(t))*cos(ϕ1(t))*e
# Wspolrzedne srodka drugiej masy nie wyważonej
xc2 := (a*cos(β - α) + e*cos(ϕ2) + x)
yc2 := -a*sin(β - α) + e*sin(ϕ2) + y
# Predkosci środka drugiej masy nie wyważonej | Podstawienie w funkcji czasu
xc2 := (a*cos(β - α) + e*cos(ϕ2) + x) substitute, α == α(t), x == x(t), ϕ2 == ϕ2(t) → x(t) + a*cos(β - α(t)) + cos(ϕ2(t))*e
yc2 := (-a*sin(β - α) + e*sin(ϕ2) + y) substitute, α == α(t), y == y(t), ϕ2 == ϕ2(t) → y(t) - a*sin(β - α(t)) + sin(ϕ2(t))*e
d/dt(xc2) → d/dt(x(t)) + a*d/dt(α(t))*sin(β - α(t)) - d/dt(ϕ2(t))*sin(ϕ2(t))*e
# Przygotowane do podmiany
d/dt(yc2) → d/dt(y(t)) + a*d/dt(α(t))*cos(β - α(t)) + d/dt(ϕ2(t))*cos(ϕ2(t))*e
d/dt(x(t)) == vx, d/dt(ϕ1(t)) == ωϕ1, α(t) == α, d/dt(α(t)) == ωα
# Predkosci srodkow mas nie wywazonych
vxc1 := d/dt(x(t)) + e*d/dt(ϕ1(t))*sin(ϕ1(t)) - a*d/dt(α(t))*sin(β - α(t)) substitute, d/dt(x(t)) == vx, d/dt(ϕ1(t)) == ωϕ1, α(t) == α, d/dt(α(t)) == ωα, ϕ1(t) == ϕ1 → vx - a*ωα*sin(β - α) + ωϕ1*e*sin(ϕ1)
vyc1 := d/dt(y(t)) + e*d/dt(ϕ1(t))*cos(ϕ1(t)) - a*d/dt(α(t))*cos(β - α(t)) substitute, d/dt(y(t)) == vy, d/dt(ϕ1(t)) == ωϕ1, α(t) == α, d/dt(α(t)) == ωα, ϕ1(t) == ϕ1 → vy - a*ωα*cos(β - α) + ωϕ1*e*cos(ϕ1)
vxc2 := d/dt(x(t)) - e*d/dt(ϕ2(t))*sin(ϕ2(t)) + a*d/dt(α(t))*sin(β - α(t)) substitute, d/dt(x(t)) == vx, d/dt(ϕ2(t)) == ωϕ2, α(t) == α, d/dt(α(t)) == ωα, ϕ2(t) == ϕ2 → vx + a*ωα*sin(β - α) - ωϕ2*e*sin(ϕ2)
vyc2 := d/dt(y(t)) + e*d/dt(ϕ2(t))*cos(ϕ2(t)) + a*d/dt(α(t))*cos(β - α(t)) substitute, d/dt(y(t)) == vy, d/dt(ϕ2(t)) == ωϕ2, α(t) == α, d/dt(α(t)) == ωα, ϕ2(t) == ϕ2 → vy + a*ωα*cos(β - α) + ωϕ2*e*cos(ϕ2)
# Jeszce raz przemieszczenia i predkosci, bez uzaleznienia od czasu
xc1 := (-a*cos(β - α) - e*cos(ϕ1) + x)
yc1 := a*sin(β - α) + e*sin(ϕ1) + y
xc2 := (a*cos(β - α) + e*cos(ϕ2) + x)
yc2 := -a*sin(β - α) + e*sin(ϕ2) + y
# Lagranżjan
Ek := mk*vx^2/2 + mk*vy^2/2 + Jc*ωα^2/2 + (Jc1 + Jw1 + Js1)*ωϕ1^2/2 + (Jc1 + Jw1 + Js1)*ωϕ2^2/2 + □ + m1*vxc1^2/2 + m1*vyc1^2/2 + m1*vxc2^2/2 + m1*vyc2^2/2  # error: This placeholder is empty.
U := mk*g*y + m1*g*yc1 + m2*g*yc2 + ky*(y + l*α)^2/2 + ky*(y - l*α)^2/2 + kx*(x + H*α)^2/2 + kx*(-x - H*α)^2/2
L := mk*vx^2/2 + mk*vy^2/2 + Jc*ωα^2/2 + (Jc1 + Jw1 + Js1)*ωϕ1^2/2 + (Jc1 + Jw1 + Js1)*ωϕ2^2/2 + m1*vxc1^2/2 + m1*vyc1^2/2 + m1*vxc2^2/2 + m1*vyc2^2/2 - mk*g*y - m1*g*yc1 - m1*g*yc2 - ky*(y + l*α)^2/2 - ky*(y - l*α)^2/2 - kx*(x + H*α)^2/2 - kx*(-x - H*α)^2/2
# Moc start linowych
D := by*(vy + l*ωα)^2/2 + by*(vy - l*ωα)^2/2 + bx*(-vx - H*ωα)^2/2 + bx*(vx + H*ωα)^2/2
# Pochodne po ALFIE  -  α
d/dωα(L) → Jc*ωα - a*m1*cos(β - α)*(vy - a*ωα*cos(β - α) + ωϕ1*e*cos(ϕ1)) + a*m1*cos(β - α)*(vy + a*ωα*cos(β - α) + ωϕ2*e*cos(ϕ2)) - a*m1*sin(β - α)*(vx - a*ωα*sin(β - α) + ωϕ1*e*sin(ϕ1)) + a*m1*sin(β - α)*(vx + a*ωα*sin(β - α) - ωϕ2*e*sin(ϕ2))
dLdωα := d/dωα(L) substitute, α == α(t), ϕ1 == ϕ1(t), ϕ2 == ϕ2(t), ωα == ωα(t), ωϕ1 == ωϕ1(t), vx == vx(t), vy == vy(t), ωϕ2 == ωϕ2(t) → Jc*ωα(t) + 2*a^2*m1*ωα(t) - a*m1*cos(β - α(t) - ϕ1(t))*ωϕ1(t)*e + a*m1*ωϕ2(t)*e*cos(β - α(t) + ϕ2(t))
d/dt(dLdωα) → Jc*d/dt(ωα(t)) + 2*a^2*m1*d/dt(ωα(t)) - a*m1*cos(β - α(t) - ϕ1(t))*d/dt(ωϕ1(t))*e + a*m1*d/dt(ωϕ2(t))*e*cos(β - α(t) + ϕ2(t)) - a*m1*sin(β - α(t) - ϕ1(t))*ωϕ1(t)*e*(d/dt(α(t)) + d/dt(ϕ1(t))) + a*m1*ωϕ2(t)*e*sin(β - α(t) + ϕ2(t))*(d/dt(α(t)) - d/dt(ϕ2(t))) simplify → Jc*d/dt(ωα(t)) + 2*a^2*m1*d/dt(ωα(t)) - a*m1*cos(β - α(t) - ϕ1(t))*d/dt(ωϕ1(t))*e + a*m1*d/dt(ωϕ2(t))*e*cos(β - α(t) + ϕ2(t)) - a*m1*sin(β - α(t) - ϕ1(t))*d/dt(α(t))*ωϕ1(t)*e - a*m1*sin(β - α(t) - ϕ1(t))*ωϕ1(t)*d/dt(ϕ1(t))*e + a*m1*d/dt(α(t))*ωϕ2(t)*e*sin(β - α(t) + ϕ2(t)) - a*m1*ωϕ2(t)*d/dt(ϕ2(t))*e*sin(β - α(t) + ϕ2(t))
dLdωαdt := d/dt(dLdωα) substitute, d/dt(ϕ2(t)) == ωϕ2, d/dt(ϕ1(t)) == ωϕ1, ϕ2(t) == ϕ2, ϕ1(t) == ϕ1, α(t) == α, d/dt(α(t)) == ωα, ωϕ1(t) == ωϕ1, ωϕ2(t) == ωϕ2, vy(t) == vy, vx(t) == vx, d/dt(vx(t)) == vvx, d/dt(vy(t)) == vvy, d/dt(ωα(t)) == ωωα, d/dt(ωϕ1(t)) == ωωϕ1, d/dt(ωϕ2(t)) == ωωϕ2 → Jc*ωωα + 2*a^2*m1*ωωα - a*m1*ωϕ1^2*sin(β - α - ϕ1)*e + a*m1*ωωϕ2*e*cos(β - α + ϕ2) - a*m1*ωωϕ1*cos(β - α - ϕ1)*e - a*m1*ωϕ2^2*e*sin(β - α + ϕ2) - a*m1*ωα*ωϕ1*sin(β - α - ϕ1)*e + a*m1*ωα*ωϕ2*e*sin(β - α + ϕ2)
d/dα(L) → ky*l*(y - α*l) - ky*l*(y + α*l) - 2*H*kx*(x + H*α) - a*m1*ωα*sin(β - α)*(vy - a*ωα*cos(β - α) + ωϕ1*e*cos(ϕ1)) + a*m1*ωα*sin(β - α)*(vy + a*ωα*cos(β - α) + ωϕ2*e*cos(ϕ2)) + a*m1*ωα*cos(β - α)*(vx - a*ωα*sin(β - α) + ωϕ1*e*sin(ϕ1)) - a*m1*ωα*cos(β - α)*(vx + a*ωα*sin(β - α) - ωϕ2*e*sin(ϕ2)) simplify → a*m1*ωα*ωϕ2*e*sin(β - α + ϕ2) - 2*kx*x*H - 2*α*ky*l^2 - a*m1*ωα*ωϕ1*sin(β - α - ϕ1)*e - 2*α*kx*H^2
dLdα := d/dα(L) → ky*l*(y - α*l) - ky*l*(y + α*l) - 2*H*kx*(x + H*α) - a*m1*ωα*sin(β - α)*(vy - a*ωα*cos(β - α) + ωϕ1*e*cos(ϕ1)) + a*m1*ωα*sin(β - α)*(vy + a*ωα*cos(β - α) + ωϕ2*e*cos(ϕ2)) + a*m1*ωα*cos(β - α)*(vx - a*ωα*sin(β - α) + ωϕ1*e*sin(ϕ1)) - a*m1*ωα*cos(β - α)*(vx + a*ωα*sin(β - α) - ωϕ2*e*sin(ϕ2))
d/dωα(D) → 2*H*bx*(vx + H*ωα) + by*l*(vy + l*ωα) - by*l*(vy - l*ωα) simplify → 2*bx*ωα*H^2 + 2*bx*vx*H + 2*by*ωα*l^2
dDdωα := d/dωα(D) → 2*H*bx*(vx + H*ωα) + by*l*(vy + l*ωα) - by*l*(vy - l*ωα)
# Pierwsze czlony
dLdωαdt → Jc*ωωα + 2*a^2*m1*ωωα - a*m1*ωϕ1^2*sin(β - α - ϕ1)*e + a*m1*ωωϕ2*e*cos(β - α + ϕ2) - a*m1*ωωϕ1*cos(β - α - ϕ1)*e - a*m1*ωϕ2^2*e*sin(β - α + ϕ2) - a*m1*ωα*ωϕ1*sin(β - α - ϕ1)*e + a*m1*ωα*ωϕ2*e*sin(β - α + ϕ2)
dLdα → ky*l*(y - α*l) - ky*l*(y + α*l) - 2*H*kx*(x + H*α) - a*m1*ωα*sin(β - α)*(vy - a*ωα*cos(β - α) + ωϕ1*e*cos(ϕ1)) + a*m1*ωα*sin(β - α)*(vy + a*ωα*cos(β - α) + ωϕ2*e*cos(ϕ2)) + a*m1*ωα*cos(β - α)*(vx - a*ωα*sin(β - α) + ωϕ1*e*sin(ϕ1)) - a*m1*ωα*cos(β - α)*(vx + a*ωα*sin(β - α) - ωϕ2*e*sin(ϕ2))
dDdωα → 2*H*bx*(vx + H*ωα) + by*l*(vy + l*ωα) - by*l*(vy - l*ωα)
rown1 := dLdωαdt - dLdα + dDdωα → Jc*ωωα + 2*H*kx*(x + H*α) + 2*a^2*m1*ωωα + 2*H*bx*(vx + H*ωα) + ky*l*(y + α*l) - ky*l*(y - α*l) + by*l*(vy + l*ωα) - by*l*(vy - l*ωα) + a*m1*ωα*sin(β - α)*(vy - a*ωα*cos(β - α) + ωϕ1*e*cos(ϕ1)) - a*m1*ωα*sin(β - α)*(vy + a*ωα*cos(β - α) + ωϕ2*e*cos(ϕ2)) - a*m1*ωα*cos(β - α)*(vx - a*ωα*sin(β - α) + ωϕ1*e*sin(ϕ1)) + a*m1*ωα*cos(β - α)*(vx + a*ωα*sin(β - α) - ωϕ2*e*sin(ϕ2)) - a*m1*ωϕ1^2*sin(β - α - ϕ1)*e + a*m1*ωωϕ2*e*cos(β - α + ϕ2) - a*m1*ωωϕ1*cos(β - α - ϕ1)*e - a*m1*ωϕ2^2*e*sin(β - α + ϕ2) - a*m1*ωα*ωϕ1*sin(β - α - ϕ1)*e + a*m1*ωα*ωϕ2*e*sin(β - α + ϕ2) simplify → Jc*ωωα + 2*H*bx*vx + 2*H*kx*x + 2*H^2*α*kx + 2*H^2*bx*ωα + 2*α*ky*l^2 + 2*by*l^2*ωα + 2*a^2*m1*ωωα - a*m1*ωϕ1^2*sin(β - α - ϕ1)*e + a*m1*ωωϕ2*e*cos(β - α + ϕ2) - a*m1*ωωϕ1*cos(β - α - ϕ1)*e - a*m1*ωϕ2^2*e*sin(β - α + ϕ2) simplify → Jc*ωωα + 2*H*bx*vx + 2*H*kx*x + 2*H^2*α*kx + 2*H^2*bx*ωα + 2*α*ky*l^2 + 2*by*l^2*ωα + 2*a^2*m1*ωωα - a*m1*ωϕ1^2*sin(β - α - ϕ1)*e + a*m1*ωωϕ2*e*cos(β - α + ϕ2) - a*m1*ωωϕ1*cos(β - α - ϕ1)*e - a*m1*ωϕ2^2*e*sin(β - α + ϕ2)
# po x-ie
d/dvx(L) → mk*vx + m1*(2*vx - 2*a*ωα*sin(β - α) + 2*ωϕ1*e*sin(ϕ1))/2 + m1*(2*vx + 2*a*ωα*sin(β - α) - 2*ωϕ2*e*sin(ϕ2))/2
# Przekopiowane bo d/dt alfa nie dzialalo
dLdvx := d/dvx(L) → mk*vx + m1*(2*vx - 2*a*ωα*sin(β - α) + 2*ωϕ1*e*sin(ϕ1))/2 + m1*(2*vx + 2*a*ωα*sin(β - α) - 2*ωϕ2*e*sin(ϕ2))/2 substitute, vx == vx(t), ωϕ1 == ωϕ1(t), ϕ1 == ϕ1(t), ωα == ωα(t), α == α(t), ωϕ2 == ωϕ2(t), ϕ2 == ϕ2(t) → 2*m1*vx(t) + mk*vx(t) + m1*ωϕ1(t)*sin(ϕ1(t))*e - m1*ωϕ2(t)*sin(ϕ2(t))*e
dLdvxdt := d/dt(dLdvx) → 2*m1*d/dt(vx(t)) + mk*d/dt(vx(t)) + m1*d/dt(ωϕ1(t))*sin(ϕ1(t))*e - m1*d/dt(ωϕ2(t))*sin(ϕ2(t))*e + m1*ωϕ1(t)*d/dt(ϕ1(t))*cos(ϕ1(t))*e - m1*ωϕ2(t)*d/dt(ϕ2(t))*cos(ϕ2(t))*e substitute, d/dt(vx(t)) == vvx, d/dt(ωϕ1(t)) == ωωϕ1, d/dt(ωϕ2(t)) == ωωϕ2, d/dt(ωα(t)) == ωωα, d/dt(ϕ1(t)) == ωϕ1, d/dt(ϕ2(t)) == ωϕ2, α(t) == α, ϕ1(t) == ϕ1, ϕ2(t) == ϕ2, ωα(t) == ωα, ωϕ1(t) == ωϕ1, ωϕ2(t) == ωϕ2, d/dt(α(t)) == ωα → m1*e*cos(ϕ1)*ωϕ1^2 - m1*e*cos(ϕ2)*ωϕ2^2 + 2*m1*vvx + mk*vvx + m1*ωωϕ1*e*sin(ϕ1) - m1*ωωϕ2*e*sin(ϕ2)
dLdvxdt := m1*e*cos(ϕ1)*ωϕ1^2 - m1*e*cos(ϕ2)*ωϕ2^2 + 2*m1*vvx + mk*vvx + m1*ωωϕ1*e*sin(ϕ1) - m1*ωωϕ2*e*sin(ϕ2)
dLdx := d/dx(L) → -kx*(2*x + 2*H*α)
dDdvx := d/dvx(D) → bx*(2*vx + 2*H*ωα)
rown2 := dLdvxdt - dLdx + dDdvx → m1*e*cos(ϕ1)*ωϕ1^2 - m1*e*cos(ϕ2)*ωϕ2^2 + kx*(2*x + 2*H*α) + 2*m1*vvx + mk*vvx + bx*(2*vx + 2*H*ωα) + m1*ωωϕ1*e*sin(ϕ1) - m1*ωωϕ2*e*sin(ϕ2) simplify → m1*e*cos(ϕ1)*ωϕ1^2 - m1*e*cos(ϕ2)*ωϕ2^2 + 2*bx*vx + 2*kx*x + 2*m1*vvx + mk*vvx + 2*H*α*kx + 2*H*bx*ωα + m1*ωωϕ1*e*sin(ϕ1) - m1*ωωϕ2*e*sin(ϕ2)
# po y-eku
d/dvy(L) → mk*vy + m1*(2*vy - 2*a*ωα*cos(β - α) + 2*ωϕ1*e*cos(ϕ1))/2 + m1*(2*vy + 2*a*ωα*cos(β - α) + 2*ωϕ2*e*cos(ϕ2))/2
dLdvy := d/dvy(L) → mk*vy + m1*(2*vy - 2*a*ωα*cos(β - α) + 2*ωϕ1*e*cos(ϕ1))/2 + m1*(2*vy + 2*a*ωα*cos(β - α) + 2*ωϕ2*e*cos(ϕ2))/2 substitute, vy == vy(t), ωϕ1 == ωϕ1(t), ωϕ2 == ωϕ2(t), ωα == ωα(t), ϕ1 == ϕ1(t), ϕ2 == ϕ2(t), α == α(t) → 2*m1*vy(t) + mk*vy(t) + m1*ωϕ1(t)*cos(ϕ1(t))*e + m1*ωϕ2(t)*cos(ϕ2(t))*e
dLdvydt := d/dt(dLdvy) → 2*m1*d/dt(vy(t)) + mk*d/dt(vy(t)) + m1*d/dt(ωϕ1(t))*cos(ϕ1(t))*e + m1*d/dt(ωϕ2(t))*cos(ϕ2(t))*e - m1*ωϕ1(t)*d/dt(ϕ1(t))*sin(ϕ1(t))*e - m1*ωϕ2(t)*d/dt(ϕ2(t))*sin(ϕ2(t))*e substitute, d/dt(vy(t)) == vvy, d/dt(ωϕ1(t)) == ωωϕ1, d/dt(ωϕ2(t)) == ωωϕ2, d/dt(ωα(t)) == ωωα, d/dt(ϕ1(t)) == ωϕ1, d/dt(ϕ2(t)) == ωϕ2, d/dt(α(t)) == ωα, α(t) == α, ϕ1(t) == ϕ1, ϕ2(t) == ϕ2, ωα(t) == ωα, ωϕ1(t) == ωϕ1, ωϕ2(t) == ωϕ2 → 2*m1*vvy - m1*e*sin(ϕ2)*ωϕ2^2 - m1*e*sin(ϕ1)*ωϕ1^2 + mk*vvy + m1*ωωϕ1*e*cos(ϕ1) + m1*ωωϕ2*e*cos(ϕ2) → 2*m1*vvy - m1*e*sin(ϕ2)*ωϕ2^2 - m1*e*sin(ϕ1)*ωϕ1^2 + mk*vvy + m1*ωωϕ1*e*cos(ϕ1) + m1*ωωϕ2*e*cos(ϕ2)
dLdvydt := 2*m1*vvy - m1*e*sin(ϕ2)*ωϕ2^2 - m1*e*sin(ϕ1)*ωϕ1^2 + mk*vvy + m1*ωωϕ1*e*cos(ϕ1) + m1*ωωϕ2*e*cos(ϕ2)
dLdy := d/dy(L) → -2*g*m1 - g*mk - ky*(2*y - 2*α*l)/2 - ky*(2*y + 2*α*l)/2
dDdvy := d/dvy(D) → by*(2*vy - 2*l*ωα)/2 + by*(2*vy + 2*l*ωα)/2
rown3 := dLdvydt - dLdy + dDdvy → 2*g*m1 - m1*e*sin(ϕ2)*ωϕ2^2 - m1*e*sin(ϕ1)*ωϕ1^2 + g*mk + 2*m1*vvy + mk*vvy + ky*(2*y - 2*α*l)/2 + ky*(2*y + 2*α*l)/2 + by*(2*vy - 2*l*ωα)/2 + by*(2*vy + 2*l*ωα)/2 + m1*ωωϕ1*e*cos(ϕ1) + m1*ωωϕ2*e*cos(ϕ2) simplify → 2*g*m1 - m1*e*sin(ϕ2)*ωϕ2^2 - m1*e*sin(ϕ1)*ωϕ1^2 + g*mk + 2*by*vy + 2*m1*vvy + mk*vvy + 2*ky*y + m1*ωωϕ1*e*cos(ϕ1) + m1*ωωϕ2*e*cos(ϕ2)
# Po fi 1
d/dωϕ1(L) → ωϕ1*(Jc1 + Js1 + Jw1) + m1*e*cos(ϕ1)*(vy - a*ωα*cos(β - α) + ωϕ1*e*cos(ϕ1)) + m1*e*sin(ϕ1)*(vx - a*ωα*sin(β - α) + ωϕ1*e*sin(ϕ1))
dLdωϕ1 := d/dωϕ1(L) → ωϕ1*(Jc1 + Js1 + Jw1) + m1*e*cos(ϕ1)*(vy - a*ωα*cos(β - α) + ωϕ1*e*cos(ϕ1)) + m1*e*sin(ϕ1)*(vx - a*ωα*sin(β - α) + ωϕ1*e*sin(ϕ1)) substitute, ωϕ1 == ωϕ1(t), ϕ1 == ϕ1(t), ωα == α(t), α == α(t), vx == vx(t), vy == vy(t) → Jc1*ωϕ1(t) + Js1*ωϕ1(t) + Jw1*ωϕ1(t) + m1*ωϕ1(t)*e^2 + m1*vy(t)*cos(ϕ1(t))*e + m1*vx(t)*sin(ϕ1(t))*e - a*m1*cos(β - α(t) - ϕ1(t))*α(t)*e
dLdωϕ1dt := d/dt(dLdωϕ1) → Jc1*d/dt(ωϕ1(t)) + Js1*d/dt(ωϕ1(t)) + Jw1*d/dt(ωϕ1(t)) + m1*d/dt(ωϕ1(t))*e^2 + m1*d/dt(vy(t))*cos(ϕ1(t))*e + m1*d/dt(vx(t))*sin(ϕ1(t))*e + m1*vx(t)*d/dt(ϕ1(t))*cos(ϕ1(t))*e - m1*vy(t)*d/dt(ϕ1(t))*sin(ϕ1(t))*e - a*m1*cos(β - α(t) - ϕ1(t))*d/dt(α(t))*e - a*m1*sin(β - α(t) - ϕ1(t))*α(t)*e*(d/dt(α(t)) + d/dt(ϕ1(t))) substitute, d/dt(vy(t)) == vvy, d/dt(vx(t)) == vvx, d/dt(ωα(t)) == ωωα, d/dt(ωϕ1(t)) == ωωϕ1, d/dt(ωϕ2(t)) == ωωϕ2, d/dt(ϕ1(t)) == ωϕ1, d/dt(ϕ2(t)) == ωϕ2, d/dt(α(t)) == ωα, α(t) == α, ϕ1(t) == ϕ1, ϕ2(t) == ϕ2, vx(t) == vx, vy(t) == vy → Jc1*ωωϕ1 + Js1*ωωϕ1 + Jw1*ωωϕ1 + m1*ωωϕ1*e^2 + m1*vvy*e*cos(ϕ1) + m1*vvx*e*sin(ϕ1) - a*m1*cos(β - α - ϕ1)*d/dt(α(t))*e + m1*vx*ωϕ1*e*cos(ϕ1) - m1*vy*ωϕ1*e*sin(ϕ1) - a*α*m1*ωϕ1*sin(β - α - ϕ1)*e - a*α*m1*sin(β - α - ϕ1)*d/dt(α(t))*e
dLdωϕ1dt := Jc1*ωωϕ1 + Js1*ωωϕ1 + Jw1*ωωϕ1 + m1*ωωϕ1*e^2 + m1*vvy*e*cos(ϕ1) + m1*vvx*e*sin(ϕ1) - a*m1*cos(β - α - ϕ1)*ωα*e + m1*vx*ωϕ1*e*cos(ϕ1) - m1*vy*ωϕ1*e*sin(ϕ1) - a*α*m1*ωϕ1*sin(β - α - ϕ1)*e - a*α*m1*sin(β - α - ϕ1)*ωα*e
dLdϕ1 := d/dϕ1(L) → m1*ωϕ1*e*cos(ϕ1)*(vx - a*ωα*sin(β - α) + ωϕ1*e*sin(ϕ1)) - m1*ωϕ1*e*sin(ϕ1)*(vy - a*ωα*cos(β - α) + ωϕ1*e*cos(ϕ1)) - g*m1*e*cos(ϕ1)
dDdωϕ1 := d/dωϕ1(D) → 0
rown4 := dLdωϕ1dt - dLdϕ1 + dDdωϕ1 → Jc1*ωωϕ1 + Js1*ωωϕ1 + Jw1*ωωϕ1 + m1*ωωϕ1*e^2 + g*m1*e*cos(ϕ1) + m1*vvy*e*cos(ϕ1) + m1*vvx*e*sin(ϕ1) + m1*ωϕ1*e*sin(ϕ1)*(vy - a*ωα*cos(β - α) + ωϕ1*e*cos(ϕ1)) - m1*ωϕ1*e*cos(ϕ1)*(vx - a*ωα*sin(β - α) + ωϕ1*e*sin(ϕ1)) - a*m1*ωα*cos(β - α - ϕ1)*e + m1*vx*ωϕ1*e*cos(ϕ1) - m1*vy*ωϕ1*e*sin(ϕ1) - a*α*m1*ωα*sin(β - α - ϕ1)*e - a*α*m1*ωϕ1*sin(β - α - ϕ1)*e simplify → Jc1*ωωϕ1 + Js1*ωωϕ1 + Jw1*ωωϕ1 + m1*ωωϕ1*e^2 + g*m1*e*cos(ϕ1) + m1*vvy*e*cos(ϕ1) + m1*vvx*e*sin(ϕ1) - a*m1*ωα*cos(β - α - ϕ1)*e - a*α*m1*ωα*sin(β - α - ϕ1)*e - a*α*m1*ωϕ1*sin(β - α - ϕ1)*e + a*m1*ωα*ωϕ1*sin(β - α - ϕ1)*e
# Po fi 2
d/dωϕ2(L) → ωϕ2*(Jc1 + Js1 + Jw1) + m1*e*cos(ϕ2)*(vy + a*ωα*cos(β - α) + ωϕ2*e*cos(ϕ2)) - m1*e*sin(ϕ2)*(vx + a*ωα*sin(β - α) - ωϕ2*e*sin(ϕ2))
dLdωϕ2 := d/dωϕ2(L) → ωϕ2*(Jc1 + Js1 + Jw1) + m1*e*cos(ϕ2)*(vy + a*ωα*cos(β - α) + ωϕ2*e*cos(ϕ2)) - m1*e*sin(ϕ2)*(vx + a*ωα*sin(β - α) - ωϕ2*e*sin(ϕ2)) substitute, ωϕ2 == ωϕ2(t), ϕ2 == ϕ2(t), ωα == α(t), α == α(t), vx == vx(t), vy == vy(t) → Jc1*ωϕ2(t) + Js1*ωϕ2(t) + Jw1*ωϕ2(t) + m1*ωϕ2(t)*e^2 + m1*vy(t)*cos(ϕ2(t))*e - m1*vx(t)*sin(ϕ2(t))*e + a*m1*α(t)*e*cos(β - α(t) + ϕ2(t))
dLdωϕ2dt := d/dt(dLdωϕ2) → Jc1*d/dt(ωϕ2(t)) + Js1*d/dt(ωϕ2(t)) + Jw1*d/dt(ωϕ2(t)) + m1*d/dt(ωϕ2(t))*e^2 + m1*d/dt(vy(t))*cos(ϕ2(t))*e - m1*d/dt(vx(t))*sin(ϕ2(t))*e - m1*vx(t)*d/dt(ϕ2(t))*cos(ϕ2(t))*e - m1*vy(t)*d/dt(ϕ2(t))*sin(ϕ2(t))*e + a*m1*d/dt(α(t))*e*cos(β - α(t) + ϕ2(t)) + a*m1*α(t)*e*sin(β - α(t) + ϕ2(t))*(d/dt(α(t)) - d/dt(ϕ2(t))) substitute, d/dt(vy(t)) == vvy, d/dt(vx(t)) == vvx, d/dt(ωα(t)) == ωωα, d/dt(ωϕ1(t)) == ωωϕ1, d/dt(ωϕ2(t)) == ωωϕ2, d/dt(ϕ1(t)) == ωϕ1, d/dt(ϕ2(t)) == ωϕ2, d/dt(α(t)) == ωα, α(t) == α, ϕ1(t) == ϕ1, ϕ2(t) == ϕ2, vx(t) == vx, vy(t) == vy → Jc1*ωωϕ2 + Js1*ωωϕ2 + Jw1*ωωϕ2 + m1*ωωϕ2*e^2 + m1*vvy*e*cos(ϕ2) - m1*vvx*e*sin(ϕ2) + a*m1*d/dt(α(t))*e*cos(β - α + ϕ2) - m1*vx*ωϕ2*e*cos(ϕ2) - m1*vy*ωϕ2*e*sin(ϕ2) + a*α*m1*d/dt(α(t))*e*sin(β - α + ϕ2) - a*α*m1*ωϕ2*e*sin(β - α + ϕ2)
dLdωϕ2dt := Jc1*ωωϕ2 + Js1*ωωϕ2 + Jw1*ωωϕ2 + m1*ωωϕ2*e^2 + m1*vvy*e*cos(ϕ2) - m1*vvx*e*sin(ϕ2) + a*m1*ωα*e*cos(β - α + ϕ2) - m1*vx*ωϕ2*e*cos(ϕ2) - m1*vy*ωϕ2*e*sin(ϕ2) + a*α*m1*ωα*e*sin(β - α + ϕ2) - a*α*m1*ωϕ2*e*sin(β - α + ϕ2)
dLdϕ2 := d/dϕ2(L) → -g*m1*e*cos(ϕ2) - m1*ωϕ2*e*sin(ϕ2)*(vy + a*ωα*cos(β - α) + ωϕ2*e*cos(ϕ2)) - m1*ωϕ2*e*cos(ϕ2)*(vx + a*ωα*sin(β - α) - ωϕ2*e*sin(ϕ2))
dDdωϕ2 := d/dωϕ2(D) → 0
rown5 := dLdωϕ2dt - dLdϕ2 + dDdωϕ2 → Jc1*ωωϕ2 + Js1*ωωϕ2 + Jw1*ωωϕ2 + m1*ωωϕ2*e^2 + g*m1*e*cos(ϕ2) + m1*vvy*e*cos(ϕ2) - m1*vvx*e*sin(ϕ2) + a*m1*ωα*e*cos(β - α + ϕ2) + m1*ωϕ2*e*sin(ϕ2)*(vy + a*ωα*cos(β - α) + ωϕ2*e*cos(ϕ2)) + m1*ωϕ2*e*cos(ϕ2)*(vx + a*ωα*sin(β - α) - ωϕ2*e*sin(ϕ2)) - m1*vx*ωϕ2*e*cos(ϕ2) - m1*vy*ωϕ2*e*sin(ϕ2) + a*α*m1*ωα*e*sin(β - α + ϕ2) - a*α*m1*ωϕ2*e*sin(β - α + ϕ2) simplify → Jc1*ωωϕ2 + Js1*ωωϕ2 + Jw1*ωωϕ2 + m1*ωωϕ2*e^2 + g*m1*e*cos(ϕ2) + m1*vvy*e*cos(ϕ2) - m1*vvx*e*sin(ϕ2) + a*m1*ωα*e*cos(β - α + ϕ2) + a*α*m1*ωα*e*sin(β - α + ϕ2) - a*α*m1*ωϕ2*e*sin(β - α + ϕ2) + a*m1*ωα*ωϕ2*e*sin(β - α + ϕ2)
