Ek := m[k]*vx^2/2 + m[k]*vy^2/2 + J[c]*ωα^2/2 + (J[c1] + J[w1] + J[s1])*ωϕ[1]^2/2 + (J[c1] + J[w1] + J[s1])*ωϕ[2]^2/2 + □ + m[1]*vx[c1]^2/2 + m[1]*vy[c1]^2/2 + m[1]*vx[c2]^2/2 + m[1]*vy[c2]^2/2  # error: This placeholder is empty.
U := m[k]*g*y + m[1]*g*yc[1] + m[1]*g*y[c2] + □ + k[y]*(y + l*α)^2/2 + k[y]*(y - l*α)^2/2 + k[x]*(x + H*α)^2/2 + k[x]*(-x - H*α)^2/2  # error: This placeholder is empty.
L := m[k]*vx^2/2 + m[k]*vy^2/2 + J[c]*ωα^2/2 + (J[c1] + J[w1] + J[s1])*ωϕ[1]^2/2 + (J[c1] + J[w1] + J[s1])*ωϕ[2]^2/2 + □ + m[1]*vx[c1]^2/2 + m[1]*vy[c1]^2/2 + m[1]*vx[c2]^2/2 + m1*vy[c2]^2/2 - mk*g*y - m1*g*y[c1] - m1*g*y[c2] + □ - k[y]*(y + l*α)^2/2 - k[y]*(y - l*α)^2/2 - k[x]*(x + H*α)^2/2 - k[x]*(-x - H*α)^2/2  # error: This placeholder is empty.
D := b[y]*(vy + l*ωα)^2/2 + b[y]*(vy - l*ωα)^2/2 + b[x]*(-vx - H*ωα)^2/2 + b[x]*(vx + H*ωα)^2/2
x[c1] := -a*cos(β - α) - e*cos(ϕ[1]) + x
y[c1] := a*sin(β - α) + e*sin(ϕ[1]) + y
x[c2] := a*cos(β - α) + e*cos(ϕ[2]) + x
y[c2] := -a*sin(β - α) + e*sin(ϕ[2]) + y
vx[c1] := vx - a*ωα*sin(β - α) + ωϕ[1]*e*sin(ϕ[1])
vy[c1] := vy - a*ωα*cos(β - α) + ωϕ[1]*e*cos(ϕ[1])
vx[c2] := vx + a*ωα*sin(β - α) - ωϕ[2]*e*sin(ϕ[2])
vy[c2] := vy + a*ωα*cos(β - α) + ωϕ[2]*e*cos(ϕ[2])  # Rownanie Alfa
rown1 := J[c]*ωωα + 2*H*b[x]*vx + 2*H*k[x]*x + 2*H^2*α*k[x] + 2*H^2*b[x]*ωα + 2*α*k[y]*l^2 + 2*b[y]*l^2*ωα + □ + 2*a^2*m[1]*ωωα - a*m[1]*ωϕ[1]^2*sin(β - α - ϕ[1])*e + a*m[1]*ωωϕ[2]*e*cos(β - α + ϕ[2]) - □ + a*m[1]*ωωϕ[1]*cos(β - α - ϕ[1])*e - a*m[1]*ωϕ[2]^2*e*sin(β - α + ϕ[2])  # error: This placeholder is empty.
M[el1] := 2*M[ut]*(ω[s] - ω[ut])*(ω[s] - ωϕ[1])/((ω[s] - ω[ut])^2 + (ω[s] - ωϕ[1])^2)
M[el2] := 2*M[ut]*(ω[s] - ω[ut])*(ω[s] - ωϕ[2])/((ω[s] - ω[ut])^2 + (ω[s] - ωϕ[2])^2)
Q[α] := M[el1] - M[el2]
Q[x] := -T[r, 1]
Q[y] := -F[r, 1]
Q[ϕ1] := M[el1]
Q[ϕ2] := M[el2]
# Rownianie X
m[1]*e*cos(ϕ[1])*ωϕ[1]^2 - m[1]*e*cos(ϕ[2])*ωϕ[2]^2 + 2*b[x]*vx + 2*k[x]*x + 2*m[1]*vvx + m[k]*vvx + 2*H*α*k[x] + □ + 2*H*b[x]*ωα + m[1]*ωωϕ[1]*e*sin(ϕ[1]) - m[1]*ωωϕ[2]*e*sin(ϕ[2])
2*g*m[1] - m[1]*e*sin(ϕ[2])*ωϕ[2]^2 - m[1]*e*sin(ϕ[1])*ωϕ[1]^2 + g*m[k] + 2*b[y]*vy + 2*m[1]*vvy + □ + m[k]*vvy + 2*k[y]*y + m[1]*ωωϕ[1]*e*cos(ϕ[1]) + m[1]*ωωϕ[2]*e*cos(ϕ[2])
# Rownanie Y
# Rowanie fi 1
J[c1]*ωωϕ[1] + J[s1]*ωωϕ[1] + J[w1]*ωωϕ[1] + m[1]*ωωϕ[1]*e^2 + g*m[1]*e*cos(ϕ[1]) + m[1]*vvy*e*cos(ϕ[1]) + □ + m[1]*vvx*e*sin(ϕ[1]) - a*m[1]*ωα*cos(β - α - ϕ[1])*e - a*α*m[1]*ωα*sin(β - α - ϕ[1])*e - □ + a*α*m[1]*ωϕ[1]*sin(β - α - ϕ[1])*e + a*m[1]*ωα*ωϕ[1]*sin(β - α - ϕ[1])*e
J[c1]*ωωϕ[2] + J[s1]*ωωϕ[2] + J[w1]*ωωϕ[2] + m[1]*ωωϕ[2]*e^2 + g*m[1]*e*cos(ϕ[2]) + m[1]*vvy*e*cos(ϕ[2]) - □ + m[1]*vvx*e*sin(ϕ[2]) + a*m[1]*ωα*e*cos(β - α + ϕ[2]) + a*α*m[1]*ωα*e*sin(β - α + ϕ[2]) - □ + a*α*m[1]*ωϕ[2]*e*sin(β - α + ϕ[2]) + a*m[1]*ωα*ωϕ[2]*e*sin(β - α + ϕ[2])
# Rownanie fi 2
m[n1]*vvx[1] = T[r, 1] - T[1, 2]
m[n1]*vvy[1] = F[r, 1] - F[1, 2] - m[n1]*g
m[n2]*vvx[2] = T[1, 2]
m[n2]*vvy[2] = F[1, 2] - m[n2]*g
F[j, (j - 1, k)] = (y[j - 1, k] - y[j, k])^p*k*(1 - (1 - R^2)/2*(1 - sgn(y[j - 1, k] - y[j, k])*sgn(vx[j - 1, k] - vx[j, k])))
F[t(j, j - 1, k)] = -μ*F[j(j - 1, k)]*sgn(vx[j, k] - vx[j - 1, k])
